*Heading
** Job name: final_2 Model name: Model-1
** Generated by: Abaqus/CAE 2022
*Preprint, echo=NO, model=NO, history=NO, contact=NO
**
** PARTS
**
*Part, name=Part-1
*Node
      1,  0.104285717, 0.00499999989
      2,  0.101428568, 0.00499999989
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*Element, type=CPS4R
   1,  787,  784,  685,  684
   2,  661,  788,  784,    2
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*Nset, nset=Set-1, generate
    1,  3399,     1
*Elset, elset=Set-1, generate
    1,  3282,     1
** Section: Section-1
*Solid Section, elset=Set-1, material=Material-1
1.,
*End Part
**
**
** ASSEMBLY
**
*Assembly, name=Assembly
**
*Instance, name=Part-1-1, part=Part-1
*End Instance
**
*Nset, nset=Set-1, instance=Part-1-1
  13,  14,  15,  16,  17,  18
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*Elset, elset=Set-1, instance=Part-1-1
    1,    3,    4,    5,   32,  157
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*Nset, nset=Set-inside, instance=Part-1-1
   1,   2,   3,   4,   5,   6
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*Elset, elset=Set-inside, instance=Part-1-1
    2,   34,   35,   51,   99,  100
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*End Assembly
*Amplitude, name=Amp-1
             0.,              0.,              1.,              1.
**
** MATERIALS
**
*Material, name=Material-1
*Density
1100.,
*Elastic
1., 0.3
** ----------------------------------------------------------------
**
** STEP: Step-1
**
*Step, name=Step-1, nlgeom=YES
*Dynamic, Explicit
, 1.
*Bulk Viscosity
0.06, 1.2
**
** BOUNDARY CONDITIONS
**
** Name: BC-1 Type: Displacement/Rotation
** Name: BC-2 Type: Displacement/Rotation
*Boundary, amplitude=Amp-1
Set-inside, 1, 1, 220.
*Boundary, amplitude=Amp-1
Set-1, 1, 1, 0
**
** OUTPUT REQUESTS
**
*Restart, write, number interval=1, time marks=NO
**
** FIELD OUTPUT: F-Output-1
**
*Output, field, variable=PRESELECT
**
** HISTORY OUTPUT: H-Output-1
**
*Output, history, variable=PRESELECT
*End Step
