*Heading
** Job name: heat_transfer_final Model name: Model-1
** Generated by: Abaqus/CAE 2022
*Preprint, echo=NO, model=NO, history=NO, contact=NO
**
** PARTS
**
*Part, name=Part-1
*Node
      1, 0.00382683426, 0.00076120469
      2, 0.00707106758, 0.0029289322
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*Element, type=CPS4R
   1,  679,  743,  555,  656
   2,  119, 1296, 1178, 1414
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*Nset, nset=Set-in
   1,   2,   3,   4,   5,   6
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*Elset, elset=Set-in
  24,  27,  29,  30,  31,  32
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*Nset, nset=Set-out
  16,  17,  18,  19,  20,  21
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*Elset, elset=Set-out
   15,   17,   38,   47,   48,   49
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*Nset, nset=Set-4, generate
    1,  1553,     1
*Elset, elset=Set-4, generate
    1,  1474,     1
*Elset, elset=_Surf-out_S4, internal
  15,  17,  48,  53,  90, 110
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*Elset, elset=_Surf-out_S2, internal
   38,   47,   49,   55,   89,  112
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*Elset, elset=_Surf-out_S3, internal
 511,
*Elset, elset=_Surf-out_S1, internal
 597,
*Surface, type=ELEMENT, name=Surf-out
_Surf-out_S4, S4
_Surf-out_S2, S2
_Surf-out_S3, S3
_Surf-out_S1, S1
** Section: Section-1
*Solid Section, elset=Set-4, material=Material-1
1.,
*End Part
**
**
** ASSEMBLY
**
*Assembly, name=Assembly
**
*Instance, name=Part-1-1, part=Part-1
*End Instance
**
*Nset, nset=Set-1, instance=Part-1-1
   1,   2,   3,   4,   5,   6
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*Elset, elset=Set-1, instance=Part-1-1
  24,  27,  29,  30,  31,  32
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*End Assembly
*Amplitude, name=Amp-1
             0.,              0.,              1.,              1.
**
** MATERIALS
**
*Material, name=Material-1
*Conductivity
2.,
*Density
1100.,
** ----------------------------------------------------------------
**
** STEP: Step-1
**
*Step, name=Step-1, nlgeom=YES
*Dynamic, Explicit
, 1.
*Bulk Viscosity
0.06, 1.2
**
** BOUNDARY CONDITIONS
**
** Name: BC-1 Type: Displacement/Rotation
*Boundary, amplitude=Amp-1
Set-1, 1, 1, 140.
**
** OUTPUT REQUESTS
**
*Restart, write, number interval=1, time marks=NO
**
** FIELD OUTPUT: F-Output-1
**
*Output, field, variable=PRESELECT
**
** HISTORY OUTPUT: H-Output-1
**
*Output, history, variable=PRESELECT, frequency=1
*End Step
